@DSL Implicit;

@Behaviour LogarithmicStrainPlasticity;
@Author Thomas Helfer/Jérémy Bleyer;
@Date 07 / 04 / 2020;

@StrainMeasure Hencky;

@Algorithm NewtonRaphson;
@Epsilon 1.e-14;
@Theta 1;

@MaterialProperty stress s0;
s0.setGlossaryName("YieldStrength");
@MaterialProperty stress H0;
H0.setEntryName("HardeningSlope");

@Brick StandardElastoViscoPlasticity{
  stress_potential : "Hooke" {
	young_modulus : 210e9,
        poisson_ratio : 0.3
        },
  inelastic_flow : "Plastic" {
    criterion : "Mises",
    isotropic_hardening : "Linear" {H : "H0", R0 : "s0"}
  }
};
